<?xml version="1.0"?>

<!--
  File:     Y-1710-99.xml
  Author:   AeromatiC++ v 3.3.10

  See: http://wiki.flightgear.org/JSBSim_Engines#FGPiston

  Inputs:
    name:           Y-1710-99
    type:           Piston Engine
    power:          870 hp
-->

<piston_engine name="Y-1710-99">
  <minmp unit="INHG">         10.0 </minmp>
  <maxmp unit="INHG">         28.5 </maxmp>
    <displacement unit="IN3"> 1710 </displacement>
  <maxhp>        1200 </maxhp>
  <cycles>         4.0 </cycles>
  <idlerpm>      700.0 </idlerpm>
  <maxrpm>      3200.0 </maxrpm>
  <sparkfaildrop>  0.1 </sparkfaildrop>
  <volumetric-efficiency> 0.85 </volumetric-efficiency>
  <man-press-lag> 0.1 </man-press-lag>
  <air-intake-impedance-factor> 1 </air-intake-impedance-factor>
  <ram-air-factor> 0.8 </ram-air-factor>
  <static-friction  unit="HP"> 4.35 </static-friction>
  <starter-torque> 696 </starter-torque>
  <starter-rpm> 1400 </starter-rpm>
 <!-- Defining <bsfc> over-rides the built-in horsepower calculations -->
 <!--<bsfc>           0.45 </bsfc>-->
  <stroke unit="IN">  6 </stroke>
  <bore unit="IN">    5.5 </bore>
  <cylinders>         12  </cylinders>
  <compression-ratio>  6.65 </compression-ratio>
  <cooling-factor> 0.95 </cooling-factor>
  <oil-pressure-relief-valve-psi> 100 </oil-pressure-relief-valve-psi>
  <design-oil-temp-degK> 325. </design-oil-temp-degK>
  <oil-pressure-rpm-max> 2100 </oil-pressure-rpm-max>
  <oil-viscosity-index> 0.25 </oil-viscosity-index>
  <maxthrottle>           1.0 </maxthrottle>
  <minthrottle>           0.0 </minthrottle>
 <boostmanual> 0 </boostmanual>
  <numboostspeeds>   2 </numboostspeeds>
 <!-- <takeoffboost>  12.75  </takeoffboost> -->


 <ratedboost1>       12.5 </ratedboost1>
  <ratedpower1>   1200    </ratedpower1>
  <ratedrpm1>      3000    </ratedrpm1>
  <ratedaltitude1> 5000    </ratedaltitude1>

  <ratedboost2>       16.5  </ratedboost2>
  <ratedpower2>     1125    </ratedpower2>
  <ratedrpm2>       2600    </ratedrpm2>
  <ratedaltitude2> 15000    </ratedaltitude2>


</piston_engine>
